// COMSOL Multiphysics 6.1.0.357 model "inertial_focusing_ver4_rot_symmetry.mph"
// Outline of the model tree

Parameters
  dp = 0.775[um]  // Particle diameter
  muf = 1.2[cP]  // Fluid dynamic viscosity
  Vav = 3.2[mm/s]  // Average channel velocity
  d = 8[um]  // Channel width
  L = 9[mm]  // Channel length
  rhof = 0.994[g/cm^3]  // Fluid density
  rhop = 2*rhof  // Particle density

Variables
  var1 "Variables 1"
    dn = abs(qr/d-0.5)  // Normalized distance from center
    dnave = fpt.ave(dn)  // Normalized distance, average
    dnstd = sqrt(fpt.ave(dn^2)-fpt.ave(dn)^2)  // Normalized distance, standard deviation

Geometry
  geom1 "Geometry 1" (2D axisymmetric, length unit µm)
    r1: Rectangle | size = {d/2, L}
    fin: Finalize "Form Union"
  pgeom_fpt "Geometry" (1D, length unit m)
    pt1: Point

Physics
  spf: LaminarFlow on all domains
    dependent variable u = {u, v, w}
    fp1: FluidProperties (default) | rho_mat = userdef; rho = rhof; mu_mat = userdef; mu = muf
    init1: init "Initial Values 1" (default)
    axi1: AxialSymmetry (default)
    wallbc1: WallBC "Wall 1" (default) | BoundaryCondition = NoSlip; UseViscousSlip = 1
    inl1: InletBoundary "Inlet 1" on boundaries 2 | BoundaryCondition = FullyDevelopedFlow; Uavfdf = Vav
    out1: OutletBoundary "Outlet 1" on boundaries 3
  fpt: FluidParticleTracing "Particle Tracing for Fluid Flow" on domains 1
    dependent variable q = {qr, qphi, qz}
    axi1: AxialSymmetry (default) | WallCondition = Pass
    wall1: Wall (default)
    pp1: ParticleProperties | dp = dp; rhop_mat = userdef; rhop = rhop
    inl1: Inlet on boundaries 2 | InitialPosition = Density; N = 50; u_src = root.comp1.u
    out1: Outlet on boundaries 3 | WallCondition = Disappear
    lf1: LiftForce on domains 1
      LiftLaw = WallInduced
      mu_mat = root.comp1.spf.mu
      u_src = root.comp1.u
      ParallelBoundary1: boundaries 4
      ParallelBoundary2: boundaries 1
    df1: DragForce on domains 1
      DragLaw = HaiderLevenspiel
      u_src = root.comp1.u
      mu_mat = root.comp1.spf.mu
      rho_mat = root.comp1.spf.rho

Mesh
  mesh1 "Mesh 1"
    size: MeshSizeDefault | hmax = 603; hmin = 2.7; hcurve = 0.3; hgrad = 1.3
    map1: Map "Mapped 1" on remaining entities
      dis1: Distribution on boundaries 2, 3 | type = predefined; elemcount = 10; elemratio = 5; symmetric = on
      dis2: Distribution on boundaries 1, 4 | numelem = 500

Studies
  std1 "Study 1"
    param: Parametric "Parametric Sweep"
      sweeptype = filled
      pname = {dp, d}
      plistarr = {30 75 290 675 755 900, 4 8}
      punit = {nm, um}
    stat: Stationary
    time: Transient "Time Dependent" | tlist = range(0,0.0005,0.01) range(0.01,0.03,6); solve for = {fpt}

Solver configurations
  sol1 "Solution 1" (study std1)
    v1: Variables "Dependent Variables 1"
    s1: Stationary "Stationary Solver 1"
      fc1: FullyCoupled | linsolver = d1; initstep = 0.01; maxiter = 100
      d1: Direct "Direct, fluid flow variables (spf)" | linsolver = pardiso; pivotperturb = 1.0E-13
    su1: StoreSolution "Solution Store 1"
    v2: Variables "Dependent Variables 2" | initmethod = sol; notsolmethod = sol
    t1: Time "Time-Dependent Solver 1"
      tlist = range(0,0.0005,0.01) range(0.01,0.03,6)
      rtol = 1.0E-5
      timemethod = genalpha
      estrat = exclude
      tstepsgenalpha = strict
      fc1: FullyCoupled | linsolver = i1; ntolfact = 0.1
      i1: Iterative
        ja1: Jacobi
  sol3 "Parametric Solutions 1" (study std1)
  sol2 "Solution Store 1" (study std1)

Datasets
  dset1: Solution | solution = sol1
  dset2: Solution | solution = sol2
  rev1: Revolve2D "Revolution 2D" | data = dset1; startangle = -90; revangle = 225
  part1: Particle
    solution = sol1
    pgeomspec = fromphysics
    pgeom = pgeom_fpt
    posdof = {comp1.qr, comp1.qz}
    physicsinterface = fpt
  dset3: Solution | solution = sol3
  rev2: Revolve2D "Revolution 2D 1" | data = dset3; startangle = -90; revangle = 225
  part2: Particle
    solution = sol3
    pgeomspec = fromphysics
    pgeom = pgeom_fpt
    posdof = {comp1.qr, comp1.qz}
    physicsinterface = fpt

Plots
  pg1: PlotGroup2D "Velocity (spf)" | data = dset1; dataisaxisym = on
    surf1: Surface | expr = spf.U
  pg2: PlotGroup2D "Pressure (spf)" | data = dset1; dataisaxisym = on
    con1: Contour | expr = p; levelrounding = off
  pg3: PlotGroup3D "Velocity, 3D (spf)" | data = rev1
    surf1: Surface | expr = spf.U
  pg4: PlotGroup2D "Particle Trajectories (fpt)" | data = part1; title = Particle trajectories, color is radial velocity
    traj1: ParticleTrajectories | pointtype = point
      col1: Color "Color Expression 1" | unit = µm/s; expr = fpt.vr; descr = Particle velocity, r-component
  pg5: PlotGroup2D "Velocity (spf) 1" | data = dset3; dataisaxisym = on; symmetryaxis = on
    surf1: Surface | expr = spf.U; unit = mm/s
    arws1: ArrowSurface | expr = {u, w}; arrowlength = logarithmic
  pg6: PlotGroup2D "Pressure (spf) 1" | data = dset3; dataisaxisym = on
    con1: Contour | expr = p; levelrounding = off
  pg7: PlotGroup3D "Velocity, 3D (spf) 1" | data = rev2
    surf1: Surface | expr = spf.U
  pg9: PlotGroup1D "1D Plot of Particle Distribution, insert A" | data = part2
    glob1: Global "Global 4 um vessel" | data = part2; expr = dnave
    glob2: Global "Global 8 um vessel" | data = part2; expr = dnave
  pg10: PlotGroup2D "Particle Trajectories, insert B"
    data = part2
    title = Particle trajectories, color is radial velocity
    traj1: ParticleTrajectories | pointtype = point
      col1: Color "Color Expression 1" | unit = µm/s; expr = fpt.vr; descr = Particle velocity, r-component
  pg11: PlotGroup2D "Particle Trajectories, insert C"
    data = part2
    title = Particle trajectories, color is radial velocity
    traj1: ParticleTrajectories | pointtype = point
      col1: Color "Color Expression 1" | unit = µm/s; expr = fpt.vr; descr = Particle velocity, r-component
  pg8: PlotGroup2D "Particle Trajectories, insert D" | data = part2
    traj1: ParticleTrajectories "Particle Trajectories 75 nm at end time"
      data = part2
      pointradiusexpr = 0.030/3
      sphereradiusscale = 140
      fixedpointsize = on
      col1: Color "Color Expression 1" | unit = µm/s; expr = fpt.vr
    traj3: ParticleTrajectories "Particle Trajectories 75 nm end time"
      data = part2
      linetype = none
      pointtype = point
      pointradiusexpr = 0.030/2
      sphereradiusscale = 2000
    traj2: ParticleTrajectories "Particle Trajectories 900 nm at end time"
      data = part2
      pointradiusexpr = 0.775/5
      sphereradiusscale = Inf
      fixedpointsize = on
      col1: Color "Color Expression 1" | expr = fpt.vr
    traj4: ParticleTrajectories "Particle Trajectories 900 nm at 0 s"
      data = part2
      linetype = none
      pointtype = point
      pointradiusexpr = 0.030/2
      sphereradiusscale = 4000
    traj5: ParticleTrajectories "Particle Trajectories 900 nm at 0.4 s"
      data = part2
      linetype = none
      pointtype = point
      pointradiusexpr = 0.030/2
      sphereradiusscale = 4000
    traj6: ParticleTrajectories "Particle Trajectories 900 nm at 1 s"
      data = part2
      linetype = none
      pointtype = point
      pointradiusexpr = 0.030/2
      sphereradiusscale = 4000
    traj7: ParticleTrajectories "Particle Trajectories 900 nm at 1.6 s"
      data = part2
      linetype = none
      pointtype = point
      pointradiusexpr = 0.030/2
      sphereradiusscale = 4000